<?xml version="1.0"?>

<!-- Copyright (c) 2024 Josh Davidson (Octal450) -->

<turbine_engine name="V2500">

	<milthrust>23000</milthrust> <!-- @ 0.2 Mach, lower at 0 Mach, handled in fadec file -->
	<tsfc>0.541</tsfc>
	<bleed>0.03</bleed>
	<ignitionn1>5.3</ignitionn1>
	<ignitionn2>28.5</ignitionn2>
	<n1spinup>0.343</n1spinup>
	<n2spinup>1.845</n2spinup>
	<n1startrate>0.365</n1startrate>
	<n2startrate>0.767</n2startrate>
	<idlen1>22.4</idlen1>
	<idlen2>60.9</idlen2>
	<maxn1>100</maxn1>
	<maxn2>100</maxn2>
	<augmented>0</augmented>
	<injected>0</injected>

	<function name="N1SpoolUp">
		<table>
			<independentVar lookup="row">/engines/engine[1]/n1</independentVar>
			<tableData>
				 24   1.1
				 28   2.9
				 46   9.7
				 68  15.4
				 80  19.6
				 94  21.4
				103  23.6
			</tableData>
		</table>
	</function>

	<function name="N1SpoolDown">
		<table>
			<independentVar lookup="row">/engines/engine[1]/n1</independentVar>
			<tableData>
				 24   1.1
				 28   2.9
				 46   9.7
				 68  15.4
				 80  19.6
				 94  21.4
				103  23.6
			</tableData>
		</table>
	</function>

	<function name="N2SpoolUp"> <!-- N1 to N2 factor 0.503865979381443 -->
		<table>
			<independentVar lookup="row">/engines/engine[1]/n1</independentVar>
			<tableData>
				 24   0.6
				 28   1.5
				 46   4.9
				 68   7.8
				 80   9.9
				 94  10.8
				103  11.9
			</tableData>
		</table>
	</function>

	<function name="N2SpoolDown"> <!-- N1 to N2 factor 0.503865979381443 -->
		<table>
			<independentVar lookup="row">/engines/engine[1]/n1</independentVar>
			<tableData>
				 24   0.6
				 28   1.5
				 46   4.9
				 68   7.8
				 80   9.9
				 94  10.8
				103  11.9
			</tableData>
		</table>
	</function>

	<function name="IdleThrust">
		<table>
			<independentVar lookup="row">velocities/mach</independentVar>
			<independentVar lookup="column">atmosphere/density-altitude</independentVar>
			<tableData>
				    -10000   0       10000   20000   30000   45000   52000
				0.0  0.0398  0.0474  0.0544  0.0594  0.0654  0.0694  0.0000
				0.2  0.0223  0.0311  0.0375  0.0464  0.0557  0.0603  0.0000
				0.4  0.0000  0.0104  0.0177  0.0312  0.0434  0.0507  0.0000
				0.5  0.0000  0.0000  0.0087  0.0226  0.0358  0.0452  0.0000
				0.6  0.0000  0.0000  0.0000  0.0144  0.0282  0.0394  0.0000
				0.8  0.0000  0.0000  0.0000  0.0000  0.0138  0.0244  0.0000
				1.0  0.0000  0.0000  0.0000  0.0000  0.0000  0.0113  0.0000
				1.2  0.0000  0.0000  0.0000  0.0000  0.0000  0.0000  0.0000
			</tableData>
		</table>
	</function>

	<function name="MilThrust"> <!-- If you change this, make sure you update the table in the engine system file -->
		<product>
			<table>
				<independentVar lookup="row">velocities/mach</independentVar>
				<independentVar lookup="column">atmosphere/density-altitude</independentVar>
				<tableData>
					    -10000   0       10000   20000   30000   45000   52000
					0.0  1.2100  1.0000  0.7400  0.5320  0.3340  0.2210  0.0000
					0.2  1.1710  0.9740  0.7090  0.5040  0.3090  0.2040  0.0000
					0.4  1.1500  0.9570  0.6920  0.4940  0.3110  0.2090  0.0000
					0.6  1.1640  0.9410  0.7140  0.4940  0.3090  0.2080  0.0000
					0.8  1.1890  0.9710  0.7350  0.5070  0.3060  0.2070  0.0000
					0.9  1.1920  0.9760  0.7320  0.5010  0.2930  0.1940  0.0000
					1.0  1.1810  0.9510  0.7020  0.4590  0.2430  0.1560  0.0000
					1.2  0.0000  0.0000  0.0000  0.0000  0.0000  0.0000  0.0000
				</tableData>
			</table>
			<property>fadec/limit/rated-thrust-factor</property>
			<table> <!-- Thrust loss due to reverser angle -->
				<independentVar lookup="row">/engines/engine[1]/reverser-pos-norm</independentVar>
				<tableData>
					0.01  1.00
					1.00  0.65
				</tableData>
			</table>
		</product>
	</function>

</turbine_engine>
